variable	RANDS universe 3436 4217 9173 3158 5680 8682 8427 9718 4380 3483 3576 1225 6081 2443 3196 9822 4489 6617 6065 6695 2198 4410 1813 4356 6435 3400 7022 6453 4058 2763 8834 3494 1124 1684 7277 8758 9553 5124 7636 9616 5655 3978 9521 4167 1603 2612 8113 9948

log 		log.lammps.${RANDS}
variable 	TEMP equal 1495
variable 	NSTEPS equal 100000000
variable 	POT string ../W_bjorkas09.eam.fs

units 		metal
dimension 	3
boundary 	p p p
atom_style 	atomic
read_restart 	../equilibrate.restart

pair_style 	eam/fs
pair_coeff 	* * ${POT} W W

neighbor 	1.0 bin
neigh_modify 	once no every 1 delay 0 check yes
group 		latAtoms type 1
group 		defatoms type 2

velocity 	all create ${TEMP} ${RANDS}

compute 	d_pe defatoms pe/atom
compute 	d_tpe defatoms reduce sum c_d_pe

thermo		1000
thermo_style 	custom step dt temp pe ke press vol lx ly lz  c_d_tpe
thermo_modify 	norm no
timestep 	1.0E-3

fix		fixnpt all npt temp ${TEMP} ${TEMP} 0.1 iso 0.0 0.0 0.1
run 		100000

unfix 		fixnpt
dump		dumpRamp all custom 1000 ramp.${RANDS}.dump id type x y z
fix 		fixnvt all nvt temp ${TEMP} ${TEMP} 0.1

run 		${NSTEPS}

write_restart	ramp.restart.${RANDS}

clear
next RANDS
jump    Trans.in
