variable	RANDS universe 7200 2005 8162 6602 3634 4974 4779 5577 5349 6034 7377 2270 9352 5510 7832 2269 1722 4087 7856 8474 8220 2456 9772 8465 7825 9750 7681 9695 5953 4741 2389 8267 7649 9736 2970 7396 1473 5653 9413 2914 5504 9490 6026 1539 8253 1652 5389 9112
log 		log.lammps.${RANDS}
variable 	TEMP equal 570
variable 	NSTEPS equal 100000000
variable 	POT string ../W_bjorkas09.eam.fs

units 		metal
dimension 	3
boundary 	p p p
atom_style 	atomic
read_restart 	../equilibrate.restart

pair_style 	eam/fs
pair_coeff 	* * ${POT} W W

neighbor 	1.0 bin
neigh_modify 	once no every 1 delay 0 check yes
group 		latAtoms type 1
group 		defatoms type 2

velocity 	all create ${TEMP} ${RANDS}

compute 	d_pe defatoms pe/atom
compute 	d_tpe defatoms reduce sum c_d_pe

thermo		1000
thermo_style 	custom step dt temp pe ke press vol lx ly lz  c_d_tpe
thermo_modify 	norm no
timestep 	1.0E-3

fix		fixnpt all npt temp ${TEMP} ${TEMP} 0.1 iso 0.0 0.0 0.1
run 		100000

unfix 		fixnpt
dump		dumpRamp all custom 1000 ramp.${RANDS}.dump id type x y z
fix 		fixnvt all nvt temp ${TEMP} ${TEMP} 0.1

run 		${NSTEPS}

write_restart	ramp.restart.${RANDS}

clear
next RANDS
jump    Trans.in
